<?xml version="1.0"?>

<!--
	File:     PW_R985.xml
	Author:   Aero-Matic v 0.82

	Inputs:
	name:           PW_R985
	type:           piston
	power:          400 hp
	augmented?      no
	injected?       no
-->

<piston_engine name="PW_R985">
	<minmp unit="INHG">          6.0 </minmp>
	<maxmp unit="INHG">         28.5 </maxmp>
	<displacement unit="IN3"> 760.00 </displacement>
	<maxhp>        400.00 </maxhp>
	<cycles>         4.0 </cycles>
	<idlerpm>      400.0 </idlerpm>
	<maxrpm>      2800.0 </maxrpm>
	<maxthrottle>    1.0 </maxthrottle><!-- Deprecated -->
	<minthrottle>    0.1 </minthrottle><!-- Deprecated -->
	<sparkfaildrop>  0.1 </sparkfaildrop>
	<volumetric-efficiency> 0.85 </volumetric-efficiency>

	<!-- Optional items that affect engine performance -->
	<!-- Defining <bsfc> over-rides the built-in horsepower calculations -->
	<bsfc>               0.20  </bsfc>
	<stroke unit="IN">   5.1875  </stroke>
	<bore unit="IN">     5.1875  </bore>
	<cylinders>          9.00  </cylinders>
	<compression-ratio>  9.00  </compression-ratio>

	<boostmanual>   1 </boostmanual>
	<numboostspeeds>3 </numboostspeeds>
	<boostoverride> 0 </boostoverride>
	<takeoffboost>  0 </takeoffboost> <!-- takeoff boost not used because it works poorly. -->

	<ratedboost1 unit="INHG"> 18.1 </ratedboost1>
	<ratedpower1 unit="HP">   450 </ratedpower1>
	<ratedrpm1>               2300 </ratedrpm1>
	<ratedaltitude1 unit="FT"> 0 </ratedaltitude1>

	<ratedboost2 unit="INHG"> 16.1 </ratedboost2>
	<ratedpower2 unit="HP">   420 </ratedpower2>
	<ratedrpm2>               2200 </ratedrpm2>
	<ratedaltitude2 unit="FT"> 26400 </ratedaltitude2>

	<ratedboost3 unit="INHG"> 48.1 </ratedboost3>
	<ratedpower3 unit="HP">   850 </ratedpower3>
	<ratedrpm3>               1800 </ratedrpm3>
	<ratedaltitude3 unit="FT"> 26400 </ratedaltitude3>

</piston_engine>
